# H10 Прямоугольный Волновод
fo := 4.2*10^9  # Центральная частота
с := 299792458  # Скорость света в вакууме
Zo := 120*π  # Волновое сопротивление свободного пространства
εo := 8.85418782*10^-12  # Электрическая постоянная
σ := 35.7*10^6  # Удельная проводимость алюминия
λo := с/fo = 0.0713792  # Длина волны в вакууме (воздухе)
a := λo*1/2 = 0.0356896  # Минимальная длина длинной стенки волновода
# Длина длинной стенки волновода, должна выбираться как среднее между
# минимальной длинной стенки и критической длиной волны, при которой
# возникают, высшие, паразитные моды
λcrit := λo  # Критическая длина волны
aeff := (2*a + a)/2 = 0.0535344  # Длина длинной стенки волновода
# Получившаяся новая критическая длина волны (от длины стенки)
λcriteff := 2*aeff = 0.107069
fcrit := с/λcriteff = 2800000000  # Критическая чатсота
fп := fcrit*2 = 5600000000  # Порог появления помех
Wh := Zo/sqrt(1 - (λo/λcriteff)^2) = 505.787  # Характеристическое сопротивление
b := 0.5*aeff = 0.0267672  # Длина короткой стенки волновода
αR := (sqrt(2*π*fo*εo/(2*σ))/(b*sqrt(1 - (λo/λcriteff)^2)))*(1 + 2*(b/aeff)*(λo/λcriteff)^2)*8.686 = 0.0359744  # Коэффициент затухания Дб/м
Pпр := 567*aeff*b*sqrt(1 - (λo/λcriteff)^2) = 0.605595  # Предельная мощность волновода (МВт)
λв := λo/sqrt(1 - (λo/λcriteff)^2) = 0.0957652  # Длина волны в волноводе
